// COMSOL Multiphysics 6.2.0.290 model "SMF_abhi.mph"
// Outline of the model tree

Parameters
  core = 4[um]
  cladding = (125/2)[um]
  plm = 10[um]
  n1 = 1.48
  n2 = 1.44

Geometry
  geom1 "Geometry 1" (2D, length unit m)
    c1: Circle | r = core
    c2: Circle | r = cladding
    c3: Circle | r = cladding+plm
    fin: Finalize "Form Union"

Materials
  mat1: Common "core" on domains 3
    RefractiveIndex
      n = n1
      ki = 0
  mat2: Common "Cladding" on domains 2
    RefractiveIndex
      n = n2
      ki = 0
  mat3: Common "plm" on domains 1
    RefractiveIndex
      n = n2
      ki = 0

Physics
  ewfd: ElectromagneticWavesFrequencyDomain on all domains
    dependent variable E = {Ex, Ey, Ez}
    wee1: WaveEquationElectric (default)
    pec1: PerfectElectricConductor (default)
    init1: init "Initial Values 1" (default)
    sctr1: Scattering "Scattering Boundary Condition 1" on boundaries 1, 2, 7, 12

Mesh
  mesh1 "Mesh 1" (physics-controlled)

Studies
  std1 "Study 1"
    mode: ModeAnalysis
      modeFreq = c_const/1550[nm]
      neigs = 11
      shift = n1
      conrad = 1
      conradynhm = 1
      linpsolnum = auto

Solver configurations
  sol1 "Solution 1" (study std1)
    v1: Variables "Dependent Variables 1"
    e1: Eigenvalue "Eigenvalue Solver 1" | neigs = 11; shift = n1; eigref = n1
      d1: Direct "Suggested Direct Solver (ewfd)"

Datasets
  dset1: Solution | solution = sol1
  cln1: CutLine2D | data = dset1; method = pointdir; genpoints = {{0, 0}, {0, 1}}; pddir = {0, 1}

Plots
  pg1: PlotGroup2D "Electric Field (ewfd)" | data = dset1
    surf1: Surface | expr = ewfd.normE
    surf2: Surface | data = dset1; expr = ewfd.normE
      hght1: Height "Height Expression 1" | expr = ewfd.normE
  pg2: PlotGroup1D "1D Plot Group 2" | data = cln1
    lngr1: LineGraph | data = cln1; expr = ewfd.normE